# ------------------
# System Setup
# ------------------

units metal  # Angstroms, eV, picoseconds
atom_style atomic

# Read initial cell, positions, masses, types
read_data ethanol.data

# ------------------
# Topology
# ------------------

pair_style metatomic ../model.pt
pair_coeff * * 6 1 8
neighbor 2.0 bin

# ------------------
# Simulation Parameters
# ------------------

# Timestep (ps)
timestep 0.0005

# Temperature (K)
variable temp equal 300.0

# Initial velocities
velocity all create ${temp} 4928459 rot yes dist gaussian

# NVT simulation using CSVR Thermostat
fix 1 all nve
fix 2 all temp/csvr ${temp} ${temp} 100.0 54324

# ------------------
# Output Settings
# ------------------

# Thermodynamic output
thermo_style custom step temp pe ke etotal
thermo 100  # every 100 steps

# Output trajectory every 100 steps
dump 1 all xyz 100 ethanol.xyz

# ------------------
# Run Simulation
# ------------------

run 1000 upto
